*Heading
 slope after excavation
** Job name: 3D-field Model name: Model-1
** Generated by: Abaqus/CAE 2020
*Preprint, echo=NO, model=NO, history=NO, contact=NO
**
** PARTS
**
*Part, name=Part-1
*End Part
**
**
** ASSEMBLY
**
*Assembly, name=Assembly
**
*Instance, name=Part-1-1, part=Part-1
          0.,           0.,         -15.
*Node
      1,          12.,   11.4641018,          15.
      2,          12.,   10.4219103,          15.
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*Element, type=C3D8
   1,  193,  194,  206,  205,    1,    2,   14,   13
   2,  194,  195,  207,  206,    2,    3,   15,   14
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*Nset, nset=soil, generate
    1,  2496,     1
*Elset, elset=soil, generate
    1,  1980,     1
*Nset, nset=right, generate
   1,  192,    1
*Elset, elset=right, generate
   1,  165,    1
*Nset, nset=bottom
  181,  182,  183,  184,  185,  186
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*Elset, elset=bottom
  155,  156,  157,  158,  159,  160
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*Nset, nset=top
    1,    2,    3,    4,    5,    6
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*Elset, elset=top
    1,    2,    3,    4,    5,    6
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*Nset, nset=back, generate
    1,  2485,    12
*Elset, elset=back, generate
    1,  1970,    11
*Nset, nset=front, generate
   12,  2496,    12
*Elset, elset=front, generate
   11,  1980,    11
*Nset, nset=left, generate
 2305,  2496,     1
*Elset, elset=left, generate
 1816,  1980,     1
*Elset, elset=_surf-right_S2, internal, generate
   1,  165,    1
*Surface, type=ELEMENT, name=surf-right
_surf-right_S2, S2
*Elset, elset=_surf-bottom_S5, internal
  155,  156,  157,  158,  159,  160
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*Surface, type=ELEMENT, name=surf-bottom
_surf-bottom_S5, S5
*Elset, elset=_surf-top_S3, internal
    1,    2,    3,    4,    5,    6
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*Surface, type=ELEMENT, name=surf-top
_surf-top_S3, S3
*Elset, elset=_surf-back_S6, internal, generate
    1,  1970,    11
*Surface, type=ELEMENT, name=surf-back
_surf-back_S6, S6
*Elset, elset=_surf-front_S4, internal, generate
   11,  1980,    11
*Surface, type=ELEMENT, name=surf-front
_surf-front_S4, S4
*Elset, elset=_surf-left_S1, internal, generate
 1816,  1980,     1
*Surface, type=ELEMENT, name=surf-left
_surf-left_S1, S1
** Section: Section-1
*Solid Section, elset=soil, material=wo2-sand
,
*End Instance
**
*End Assembly
**
** MATERIALS
**
*Material, name=wo2-sand
*Density
 1.54303,
*Depvar
    100,
*User Material, constants=31, unsymm
 0.6249,    0.333, 1.07e+07,     0.24,     0.53,     0.84,       1.,     0.12
      2.2,       2.,       5.,   0.0001,      0.5,       6.,       0.,      0.6
 0.558505,     467.,      0.2,     100.,     0.46,       0.,      1.6,   0.0036
    0.016, 0.000105,     0.48,    0.829,     0.44,     3.02,     100.
**
** BOUNDARY CONDITIONS
**
** Name: back-U2 Type: Displacement/Rotation
*Boundary
Part-1-1.back, 2, 2
** Name: bottom-U3 Type: Displacement/Rotation
*Boundary
Part-1-1.bottom, 3, 3
** Name: front-U2 Type: Displacement/Rotation
*Boundary
Part-1-1.front, 2, 2
** Name: left-U1 Type: Displacement/Rotation
*Boundary
Part-1-1.left, 1, 1
** Name: right-U1 Type: Displacement/Rotation
*Boundary
Part-1-1.right, 1, 1
**
** PREDEFINED FIELDS
**
** Name: Predefined Field-1   Type: Geostatic stress
*Initial Conditions, Type=solution, user
*Initial Conditions, type=STRESS, GEOSTATIC
Part-1-1.soil, 0., 0., -231.454, -15., 0.414984, 0.414984
** ----------------------------------------------------------------
**
** STEP: Step-1
**
*Step, name=Step-1, nlgeom=YES
Geostatic equilibrium
*Geostatic
**
** LOADS
**
** Name: Load-1   Type: Gravity
*Dload
, GRAV, 10., 0., 0., -1.
** Name: Load-2   Type: Pressure
*Dsload
Part-1-1.surf-top, P, 5.
**
** OUTPUT REQUESTS
**
*Restart, write, frequency=0
**
** FIELD OUTPUT: F-Output-1
**
*Output, field
*Node Output
UT,
*Element Output, directions=YES
E, S, SDV
**
** HISTORY OUTPUT: H-Output-1
**
*Output, history, variable=PRESELECT
*End Step
** ----------------------------------------------------------------
**
** STEP: Step-2-pile-1
**
*Step, name=Step-2-pile-1, nlgeom=YES, inc=1000
Vibration
*Static
0.1, 1050., 0.0105, 1050.
**
** OUTPUT REQUESTS
**
*Restart, write, frequency=0
**
** FIELD OUTPUT: F-Output-1
**
*Output, field
*Node Output
UT,
*Element Output, directions=YES
E, S, SDV
**
** HISTORY OUTPUT: H-Output-1
**
*Output, history, variable=PRESELECT
*End Step
** ----------------------------------------------------------------
**
** STEP: Step-3-pile-2
**
*Step, name=Step-3-pile-2, nlgeom=YES, inc=1000
Vibration
*Static
0.1, 1050., 0.0105, 1050.
**
** OUTPUT REQUESTS
**
*Restart, write, frequency=0
**
** FIELD OUTPUT: F-Output-1
**
*Output, field
*Node Output
UT,
*Element Output, directions=YES
E, S, SDV
**
** HISTORY OUTPUT: H-Output-1
**
*Output, history, variable=PRESELECT
*End Step
** ----------------------------------------------------------------
**
** STEP: Step-4-pile-3
**
*Step, name=Step-4-pile-3, nlgeom=YES, inc=1000
Vibration
*Static
0.1, 1050., 0.0105, 1050.
**
** OUTPUT REQUESTS
**
*Restart, write, frequency=0
**
** FIELD OUTPUT: F-Output-1
**
*Output, field
*Node Output
UT,
*Element Output, directions=YES
E, S, SDV
**
** HISTORY OUTPUT: H-Output-1
**
*Output, history, variable=PRESELECT
*End Step
